*HEADING
** Single U8 cohesive element verification (Turon 3D_CZM.f) - mixed mode
*NODE
1, 0.0, 0.0, 0.0
2, 1.0, 0.0, 0.0
3, 1.0, 0.0, 1.0
4, 0.0, 0.0, 1.0
5, 0.0, 0.0, 0.0
6, 1.0, 0.0, 0.0
7, 1.0, 0.0, 1.0
8, 0.0, 0.0, 1.0
*NSET, NSET=ALL
1, 2, 3, 4, 5, 6, 7, 8
*NSET, NSET=BOTTOM
1, 2, 3, 4
*NSET, NSET=TOP
5, 6, 7, 8
*NSET, NSET=SIDEX
1, 4, 5, 8
*NSET, NSET=SIDEZ
1, 2, 5, 6
*USER ELEMENT, TYPE=U8, NODES=8, COORDINATES=3, IPROPERTIES=1, PROPERTIES=7, VARIABLES=200
1, 2, 3
*ELEMENT, TYPE=U8, ELSET=INTERFACE
1, 1, 4, 3, 2, 5, 8, 7, 6
*UEL PROPERTY, ELSET=INTERFACE
0.187, 0.781, 38.0, 52.0, 52.0, 1.22, 1E5, 2
*BOUNDARY
BOTTOM, 1, 3, 0.0
*STEP, INC=100, NLGEOM
*STATIC
0.001, 1.0,
*MONITOR, DOF=2, NODE=5
*BOUNDARY
** Step 1 target: equal normal/shear
TOP, 1, 1, 0.005
TOP, 2, 2, 0.005
*OUTPUT, FIELD, FREQ=1
*NODE OUTPUT
U,
RF,
*OUTPUT, HISTORY, FREQ=1
*NODE OUTPUT, NSET=ALL
U2,
RF2
*EL PRINT, ELSET=INTERFACE, FREQ=1
SDV1, SDV2, SDV3, SDV4, SDV5, SDV6, SDV7, SDV8, SDV9, SDV10,
SDV11, SDV12, SDV13, SDV14, SDV15, SDV16, SDV17, SDV18, SDV19, SDV20,
SDV21, SDV22, SDV23, SDV24, SDV25, SDV26, SDV27, SDV28, SDV29, SDV30,
SDV31, SDV32, SDV33, SDV34, SDV35, SDV36, SDV37, SDV38, SDV39, SDV40,
SDV100, SDV101, SDV102, SDV103, SDV104, SDV105, SDV106, SDV107, SDV108
*END STEP
*STEP, INC=100, NLGEOM
*STATIC
0.001, 1.0,
*MONITOR, DOF=2, NODE=5
*BOUNDARY
** Step 2 target: higher shear, same normal
TOP, 1, 1, 0.005
TOP, 2, 2, 0.01
*OUTPUT, FIELD, FREQ=1
*NODE OUTPUT
U,
RF,
*OUTPUT, HISTORY, FREQ=1
*NODE OUTPUT, NSET=ALL
U2,
RF2
*EL PRINT, ELSET=INTERFACE, FREQ=1
SDV1, SDV2, SDV3, SDV4, SDV5, SDV6, SDV7, SDV8, SDV9, SDV10,
SDV11, SDV12, SDV13, SDV14, SDV15, SDV16, SDV17, SDV18, SDV19, SDV20,
SDV21, SDV22, SDV23, SDV24, SDV25, SDV26, SDV27, SDV28, SDV29, SDV30,
SDV31, SDV32, SDV33, SDV34, SDV35, SDV36, SDV37, SDV38, SDV39, SDV40,
SDV100, SDV101, SDV102, SDV103, SDV104, SDV105, SDV106, SDV107, SDV108
*END STEP
